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/batch
! ANSYS input file written by Workbench version 2025 R1
! File used for geometry attach: D:\Abhishek\Canti-1_files\dp0\SYS\DM\SYS.agdb
/title,Canti-1--Static Structural (A5)
/COM,/COM,     ANSYSMotion, 2025.1
/com,--- Data in consistent NMM units. See Solving Units in the help system for more information.
/units,MPA
/prep7
! Turn off shape checking because checks already performed inside WB mesher.
! See help system for more information.
SHPP,OFF,,NOWARN
etcon,set             ! allow ANSYS to choose best KEYOP's for 180x elements, resets any applicable keyopt to MAPDL defaults
/com,*********** Nodes for the whole assembly ***********
nblock,3,,17000
(1i9,3e20.9e3)
        1     8.800000000E+02     2.000000000E+01     5.000000000E+00
        2     8.600000000E+02     2.000000000E+01     5.000000000E+00
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-1
/com,*********** Elements for Body 1 'Solid' ***********
et,1,186
keyo,1,2,1          ! set full integration on SOLID186
eblock,19,solid,,2700
(19i9)
        1        1        1        1        0        0        0        0       20        0        1        1     4159     4130     4041     2552     4160     4129     4128
     4284    15235    15103     4283    12080    15234    15232    12079     4281    15293    15233    15102
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-1
/com,*********** Send User Defined Coordinate System(s) ***********
csys,0
toffst,273.15,      ! Temperature offset from absolute zero
/com,*********** Set Reference Temperature ***********
tref,22.
/com,*********** Send Materials ***********
Temperature = 'TEMP' ! Temperature
MP,DENS,1,7.85e-09,	! tonne mm^-3
MP,ALPX,1,1.2e-05,	! C^-1
MP,C,1,434000000,	! mm^2 s^-2 C^-1
MP,KXX,1,60.5,	! tonne mm s^-3 C^-1
MP,RSVX,1,0.00017,	! ohm mm
MP,EX,1,200000,	! tonne s^-2 mm^-1
MP,NUXY,1,0.3,
MP,MURX,1,10000,

!************************* Model Summary ********************
!Solid,	Structural Steel,	matid,	1
!************************* End Model Summary ********************
CMBLOCK,SELECTION,NODE,        3
(8i10)
      3903      4129      4130
/com,*********** Fixed Supports ***********
CMBLOCK,_FIXEDSU,NODE,      245
(8i10)
      3948      3949      3950      3951      3952      3953      3954      3955
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cmsel,s,_FIXEDSU
d,all,all
nsel,all
/com,*********** Create Direct FE , Forces ****
CMBLOCK,_CM38F  ,NODE,        3
(8i10)
      3903      4129      4130
fini
/com,****************************************************************************
/com,*************************    SOLUTION       ********************************
/com,****************************************************************************
/solu
antype,0                   ! static analysis
_thickRatio=  0     ! Ratio of thick parts in the model
eqsl,sparse,,,,,1
cntr,print,1               ! print out contact info and also make no initial contact an error
nldiag,cont,iter           ! print out contact info each equilibrium iteration
rescontrol,,none                 ! Do not keep any restart files
/com,****************************************************
/com,******************* SOLVE FOR LS 1 OF 1 ****************
/com,**** Set Direct FE , Forces ****
f,_CM38F,fx,0.
f,_CM38F,fy,-333333.333333333
f,_CM38F,fz,0.
nsub,1,1,1
time,1.
outres,erase
outres,all,none
outres,nsol,all  ! Output nodal forces at all time points for Topology Optimization future intent
outres,rsol,all
outres,eangl,all
outres,etmp,all
outres,veng,all
outres,nload,all  ! Output nodal forces at all time points for Topology Optimization future intent
outres,strs,all
outres,bkstr,all
outres,epel,all,
outres,eppl,all,
outres,cont,all,
save, file_Static24, db ! Topology optimization database
! *********** WB SOLVE COMMAND ***********
! check interactive state
*get,ANSINTER_,active,,int
*if,ANSINTER_,ne,0,then
/eof
*endif
solve
/com *************** Write FE CONNECTORS *********
CEWRITE,file,ce,,INTE
/com,****************************************************
/com,*************** FINISHED SOLVE FOR LS 1 *************
*get,_NSOLTHREADS,active,0,ntfs
*get,_NSOLPROCESSES,active,0,npfs
/post1
fini
